# AguaClara Water Treatment Plants
# Automated Design
# User Inputs:
HW_Sed := 2.1 m
# Design References
# [reference: PipeDatabase.xmcd]
# [reference: UserInputs- test.xmcd]
# [reference: DesignAssumptions-test.xmcd]
# [reference: MathFunctions.xmcd]
# [reference: MinorLossCoefficients.xmcd]
# [reference: FluidsFunctions.xmcd]
# Sedimentation Tanks:
# [reference: Sedimentation.xmcd]
N_SedTanks = 6
H_SedBetween = 0.060325 m
HW_Sed = 2.1 m
H_Sed = 2.2 m
L_Sed = 9.6182 m
# Sedimentation Tank Sludge Drain:
# [reference: SludgeDrain.xmcd]
N_SedSludgeOrifices = 96
ND_SedSludge = 6 in
Q_SludgeDrainInitial = 1453.6 L/min
D_SedSludgeOrifice = 0.1875 in
# Height Dimensions within Sedtank
H_SedBelowSlope := .5*W_Sed/N_SlopePairs*tan(AN_SedTopInlet) + T_SedInletSlope/cos(AN_SedTopInlet) + outerdiameter(ND_SedSludge) = 1.20315 m
# This depth of the sloped bottom
H_SedBelow := H_SedBelowSlope + H_SedBetween = 1.26347 m  # the entire area under the lamella will be a part of the sloped bottom
# Inlet Channel:
# [reference: Inlet Channel.xmcd]
W_InletChannel = 0.912871 m
L_Channel = 7.377 m
ND_SedPipeEntrance = 12 in
N_SedInletPipes = 8
H_InletChannel = 0.846851 m
Q_Plant = 800 gal/min
# Sedimentation Tank Inlet Slopes:
# [reference: Sed. Inlet Slopes- minV.xmcd]
B_SedInlet = 3.80249 cm
L_SedTopFilled = -5.11086 m
H_SedInlet = 11.1177 cm
W_SlopesFilled = -2.55543 m
L_SedBottomFilled = -3.33588 m
AN_SedTopInlet = 60 deg
L_SedTopInlet = 1.0795 m
AN_SedBottom = 40 deg
A_SedInletTotal = 1300.72 cm^2
A_SedInlet = 42773 cm^2
H_SedTopSlope = 0.934874 m
A_SedInletActual = 42765.3 cm^2
A_Inlet = 10693.3 cm^2
L_SedBottom = 0.704594 m
Z_SedSlopes = 1.20315 m
H_SedBottomSlope = 0.452904 m
L_SedTopInlet = 1.0795 m
W_SlopesOpen = 3.09518 m
# Sedimentation Tank Effluent Launder:
# [reference: Launder.xmcd]
N_SedLaunderOrifices = 152
Q_SedLaunderOrifices = 1.66027 L/min
# Exit Channel:
# [reference: Exit Channel.xmcd]
W_ExitChannel = 0.912871 m
ND_SedLaunder = 6 in
H_ExitChannel = 0.846851 m
L_SedLaunder = 7.64246 m
L_ExitChannel = 7.377 m
D_SedLaunderOrifice = 0.3125 in
H_PltWeir = 0.611882 m
Z_SedLaunder = 1.97586 m
HW_ExitChannel = 0.706851 m
# Lamella:
# [reference: Lamella.xmcd]
L_SedPlate = 0.725441 m
B_SedPlate = 3.68493 cm
S_SedPlate = 3.38493 cm
N_SedPlates = 169
AN_SedPlate = 60 deg
V_SedC = 10.0076 m/day
V_SedUp = 70 m/day
H_SedPlate = 0.628251 m
H_SedAbove = 0.208275 m
# Flow Controller:
# [reference: FCM.xmcd]
N_Fcm = 6
ID_FcmTube = 4.318 mm
ID_FcmTube = 0.17 in
L_FcmTube = 255.151 cm
Q_FcmTubeMax = 378.541 mL/min
HL_FcmValve = 26.6223 cm
# Flocculator:
# [reference: Flocculation.xmcd]
W_FlocChannel = 0.53975 m
S_FlocBaffle = [38.6239; 46.2041; 61.2545; 157.366] m
B_FlocBaffle = [3862.79; 4620.81; 6125.85; 15737] m
N_FlocBafflesMin = 19
HL_Floc = 0.0789618 cm
X_FlocBaffles =  # no stored result
HW_FlocStart = 2.10079 m
L_FlocBaffles =  # no stored result
W_FlocPort = 157.366 m
H_FlocPort = 0.53975 m
N_FlocBaffles = 17529
Z_FlocBaffles =  # no stored result
Gt_FlocMinFlow = 6564965
N_FlocChannels = 17529
# Entrance Tank:
# [reference: EntranceTank.xmcd]
ND_Lfom = 20 in
HL_Rm = 0.890191 cm
N_Lfom = 1
D_LfomOrifices = 52.3875 mm
Q_LfomErrorMax = 0.74575 %
N_LfomOrifices = [5; 4; 3; 2; 2; 2; 1; 2; 1; 1]
L_Et = 3 m
W_Et = 1.5 m
HW_EtMin = 0.2 m
HW_EtMax = 0.4 m
H_Et = 2.50079 m
ZW_Et = 2.40079 m
# Any additional needed elevations should be calculated in the files above.
# Elevations:
ZW_ExitChannel = 2.06 m  # Water Level at the end of the plant in the exit channel and exit channel box
HW_Sed = 2.1 m
HW_FlocStart = 2.10079 m  # Water level at the beginning of the floc tank
HL_Floc = 0.0789618 cm  # just for ref. the head loss throught the floc tank
ZW_Et = 2.40079 m  # the height of the water in the entrance tank.
Z_Mp := (HW_Sed - HW_InletChannel)
# AutoCAD References
# [reference: basics.xmcd]
# [reference: pipe.xmcd]
# [reference: tank.xmcd]
# [reference: lamina.xmcd]
# [reference: cross.xmcd]
# [reference: Tee.xmcd]
# [reference: elbow.xmcd]
# [reference: Sludge.xmcd]
# [reference: Channel.xmcd]
# [reference: Manifold.xmcd]
# [reference: SedTankslopes.xmcd]
# [reference: Sed Tank Inlet Slope.xmcd]
# [reference: chemicalstock.xmcd]
# [reference: Sedimentation Tank.xmcd]
# [component: inputs SedTank]
# [reference: Flocculation Tank.xmcd]
# [component: inputs FlocTank]
# [reference: Entrance Tank.xmcd]
# [component: inputs EntranceTank]
