# AguaClara Design Tool
C_ChlorineDoseMax := 2*mg/L
C_ChlorineStock := 50*gm/L
Ti_ChlorineStock := 30 hr
Country := 0  # Needs to be redefined as zero until we create a database for all countries.
Q_Plant := □  # error: This placeholder is empty.
## References
# MathCAD dimension calculations:
# [reference: BasicInputs.xmcd]
# [reference: ExpertInputs.xmcd]
# [reference: MathFunctions.xmcd]
# [reference: PipeDatabase.xmcd]
# [reference: FluidsFunctions.xmcd]
N_SedBaysEst :=
    2 if Q_Plant ≥ 12*L/s
    1 otherwise
N_SedBaysEst = 2
N_SedTanks :=
    ceil(Q_Plant/(N_SedBaysEst*Q_PipeED(ED_SedInlet, 6 in, Pi_VenaContractaOrifice, Pi_Jet))) if Q_Plant ≤ 30*L/s
    ceil(Q_Plant/(N_SedBaysEst*Q_PipeED(ED_SedInlet, 8 in, Pi_VenaContractaOrifice, Pi_Jet))) otherwise
N_SedTanks = 3
# [reference: SedimentationTank.xmcd]
# [reference: Flocculator.xmcd]
# [reference: LFOM.xmcd]
# [reference: EntranceTank.xmcd]
# [reference: StackedRapidSandFilter.xmcd]
# [reference: LinearCdc.xmcd]
# [reference: ChemStorageTanks.xmcd]
# [reference: MaterialsList.xmcd]
# AutoCAD drawing programs:
# Translators:
# These are the codes that take MathCAD outputs and create AutoCAD scripts that are used to draw the plant (formerly Basics)
# [reference: MtoATranslators.xmcd]
# The wrapped MtoA translator contains the functions that the user will want to access. These functions will draw pieces with full functionality - specifying the location, dimension, and orientation of the object. Also, it contains layer control and subtraction capabilities for grouped objects.
# [reference: MtoATranslatorsWrapped.xmcd]
# Drawing functions:
# [reference: ChannelF.xmcd]
# [reference: PlumbingF.xmcd]
# [reference: TankF.xmcd]
# [reference: StairsF.xmcd]
# [reference: DrainChannelF.xmcd]
# AutoCAD Script Files:
# [reference: FlocculatorAC.xmcd]
# [reference: SedimentationTankAC.xmcd]
# [reference: EntranceTankAC.xmcd]
# [reference: ChemStockTanksAC.xmcd]
# [reference: StackedRapidSandFilterAC.xmcd]
# [reference: CdcAC.xmcd]
# [reference: OperatorAccessAC.xmcd]
# [reference: MaterialsAC.xmcd]
# Layouts:
# This file will execute at the very end to create multiple views of the entire plant in paperspace
# [reference: LayoutsAC.xmcd]
## All variables displayed must have the standard SI units. They may not have units attached by the user.
Q_Plant = 0.032 m^3/s
Pi_VenaContractaOrifice = 0.62
T_PlantWall = 0.15 m
W_SedPlate = 1.0668 m
T_ConcreteMin = 0.05 m
L_SedPlateSheet = 3 m
C_CoagStock = 384 kg/m^3
T_SedPlate = 0.002 m
Ti_CoagStock = 108000 s
T_SedWeir = 0.04 m
C_ChlorineStock = 50 kg/m^3
W_SedBay = 1.0668 m
Ti_ChlorineStock = 108000 s
HL_ChannelMax = 0.05 m  # Eliminate FCM variable from design specs
H_PlantFreeboard = 0.1 m
EN_DrillSeries = 0
# General
# Entrance Tank
V_EtUp = 0.008 m/s
W_EtCapture = 0.795042 m
H_EtOverflowChannel =  # error: This variable is undefined.
H_Et = 1.382 m
H_EtTop = 0.3 m  # height of the top part of the entrance tank above the hoppers
W_Et = 0.838963 m
L_Et = 6.31478 m
ND_EtDrain = 0.0762 m
HL_Lfom = 0.2 m
ZW_Et = 2.36984 m
Z_EtTop = 2.46984 m
Z_Et = 1.08784 m  # elevation of top of slab.
ND_RMPipe = 0.3048 m
Z_EtHopper = 2.16984 m
H_EtHopper = 1.082 m
N_EtHoppers =  # error
ND_EtFlowControl = 0.1524 m
L_EtHopper = 2.36559 m
AN_EtSlope = 0.785398
W_EtDC = 0.236538 m  # drain channel under entrance tank dimensions
L_EtDC = 6.46478 m
H_EtDC = 0.32294 m  # Give heights of the channel at the beginning and end and change the design specs to explain that it's sloped.
# Flow measurement
D_LfomOrifices = 0.01905 m
S_LfomRows =  # error
H_LfomOrifice = [0.009525; 0.029525; 0.049525; 0.069525; 0.089525; 0.109525; 0.129525; 0.149525; 0.169525; 0.189525] m
Q_LfomScale =  # error
N_LfomOrifices = [25; 23; 11; 11; 8; 9; 7; 7; 6; 7]
ND_Lfom =  # error
HL_Lfom = 0.2 m
# Rapid Mix
ED_Tee = 0.11201 m^2/s^3
Z_LfomOrifices = 2.17936 m  # elevation of the center of
Z_EtExit =  # error  # elevation of center of pipe exiting the entrance tank and heading toward the flocculator
W_DC =  # error
# Maybe give the vertical distances below the bottom of the sed tank of the beginning and end of the channel? Calculate them, display, and add to the design specs.
H_DC =  # error
L_DC =  # error
# Plant Drain Channel
Z_CoagTank = 2.73754 m
Z_CoagTankOutlet = 2.83754 m
L_CdcFloatArm = 0.41275 m
Q_CdcMax =  # error
L_CdcScaleArm = 0.50165 m
C_CoagDoseMax = 0.06 kg/m^3
B_StockOutlet = 0.1 m
L_CoagCdcTube = 1.01156 m
D_CdcTube =  # error
N_CoagCdcTubes = 1
HL_Cdc = 0.2 m
L_CdcFloatArm = 0.41275 m
L_CdcScaleArm = 0.50165 m
# Coag Dose Controller
# Flocculator
H_Floc = 2.02487 m
Z_FlocTank = 0 m  # Look at Flocculator Positioning arrays
N_FlocValves = 2
W_FlocChannel = 0.54 m
Ti_Floc =  # error  # Fill last channel with bafffles from last channel
H_FlocSlope = 0.04445 m  # Fix port width to be based on energy dissipation in that channel
ED_Floc = 0.01 m^2/s^3
# Adjust spacing after the number of baffles per channel is known.
V_Floc = 0.113004 m/s  # Check the residence time of the flocculator should be at least 20minutes
HW_FlocEnd = 1.84837 m
ND_FlocValve = 0.0762 m
CP_Floc = 75 m^(2/3)
Ti_FlocDrain = 1800 s
CP_FlocTotal =  # error
N_FlocChannels = 4
G_Floc =  # error
L_FlocTank =  # error
HL_Floc = 0.0765028 m
ED_FlocChannelFirst =  # error
HW_FlocStart = 1.92487 m
S_FlocBaffle = [0.524398; 0.524398; 0.524398; 0.524398] m
B_FlocBaffle = [0.526398; 0.526398; 0.526398; 0.526398] m
N_FlocChannelBaffles = [11; 11; 11; 10]
W_FlocPort = [0.504398; 0.504398; 0.504398; 0.392538] m
S_FlocBaffleFirst =  # error
HL_FlocChannels =  # error
L_FlocBaffleLower = 1.06177 m
L_FlocBaffleUpper = 1.18828 m
H_FlocPort = [0.842117; 0.842117; 0.842117; 0.842117] m
Ti_Floc =  # error  # residence time of the flocculator
N_FlocBaffles =  # error
ND_FlocValve = 3 in
EN_FlocBaffle = 1
# Sed Tanks
N_SedTanks = 3
L_Sed = 6.31478 m
N_SedBays = 2  # Number of bays of inlet manifolds in each sed tank
Q_SedBay = 0.00533333 m^3/s
V_SedUpBod = 0.001 m/s  # design constraints
V_SedCBod = 0.00012 m/s
V_SedUp = 0.000998436 m/s  # Actual values from this design
V_SedC =  # error
W_SedSideSlopes = 0.52505 m
AN_SedSlope = 0.872665
Ti_Sed = 1777.1 s
# Sedimentation Tank Sludge Drain:
N_SedSludgeOrifices = 48  # per cell
Ti_SludgeDrain = 1800 s  # Tank Drain time
W_SedSludge = 0.091491 m  # Width of the sludge channel
H_SedSludge = 0.091491 m  # Depth of the sludge channel
# Distance center to center between drain orifices
B_SedSludgeOrifices = 0.104067 m
W_SedDrainCover = 0.131491 m
D_SedSludgeOrifice = 0.00932078 m  # Diameter of drain orifices
N_SedSludgeOrifices = 48
ND_SedSludgePipe = 0.1016 m
# Sedimentation Tank Dimensions:
Z_SedSludge = 0.091491 m  # Height from 0 of the top of the sludge drain
Z_SedSideSlopes = 0.783921 m
W_Sed = 2.1336 m  # Total tank wall height
L_Sed = 6.31478 m  # Total tank length
H_Sed = 1.94837 m
# Sedimentation Tank Inlet Channel:
EN_InletChannelGeom = 1
HW_SedInletChannel = 0.392101 m
W_SedInletChannel = 0.582538 m
L_SedChannel = 6.7008 m
H_SedInletChannel = 0.492101 m
HL_SedWeirInlet = 0.018951 m
W_SedInletChannelPreWeir = 0.392538 m
H_SedWeirInlet = 0.37315 m
W_SedWeirInlet = 6.7008 m
# Sedimentation Tank Effluent Launder:
N_SedLaunderOrifices = 49  # Number of orifices per launder
N_SedLaunderOrificesRow =  # error  # Number of orifices per row
Z_SedLaunder = 1.69734 m
Q_SedLaunderOrifices = 0.000108844 m^3/s
B_SedLaunderOrifices = 0.1 m  # Center to center launder spacing
# More Launder Dimensions
ND_SedLaunder = 0.1524 m
D_SedLaunderOrifice = 0.015875 m
L_SedLaunder = 5.09052 m
HL_SedLaunderOrifice = 0.0401085 m
# Sedimentation Tank Inlet Manifold:
ND_SedManifold = 0.2032 m
L_SedManifoldDiffuser = 0.157882 m
Z_SedManifoldPipe = 0.41667 m
ND_SedDiffuser = 0.0254 m
D_SedManifoldPort = 0.03175 m
B_SedManifoldPort = 0.05 m
N_SedManifoldPorts = 98
L_SedManifoldPipe = 5.05091 m
ED_SedInlet = 0.01 m^2/s^3
Q_SedManifoldPort = 5.44218e-5 m^3/s
# Exit Channel:
W_SedExitChannel = 0.435037 m
H_SedExitChannel = 0.492101 m
HW_SedExitChannel = 0.352101 m  # water height in exit channel from base of channel
H_SedWeirExit = 0.33315 m
# Lamella:
L_SedPlate = 0.6 m
B_SedPlate = 0.027 m  # center to center distance between lamella
S_SedPlate = 0.025 m  # spacing between lamella
N_SedPlates = 160  # Number of Sed Plates per Sedimentation Tank Bay.
N_SedModules = 32  # Number of modules per bay
N_SedModulePlates = 5  # Number of plates per module
AN_SedPlate = 1.0472
L_SedActive = 4.986 m
Z_SedLaunder = 1.69734 m
HW_Sed = 1.84837 m
H_Sed = 1.94837 m
# SRSF
H_Fi = 4.59323 m
L_Fi = 1.08239 m
W_Fi = 1.5629 m
B_FiManifoldBranch = 0.1 m
ND_FiTrunk = 0.1524 m
ND_FiManBranch = 0.0254 m
ND_FiBwTrunk = 0.2032 m
ND_FiBwManBranch = 0.0381 m
ND_FiExitWaste = 0.1016 m
ND_FiBwWeirDrain =  # error
ND_FiBwDrain =  # error  # For the box that holds keeps the end of the siphon submerged
ND_FiSandOutlet = 0.0508 m
Ti_FiSand = 812.265 s  # This is the time required to empty the filter of the sand.
ND_FiSiphonAirValve = 0.01905 m
ND_FiSiphon = 0.2032 m
Q_FiSiphonMax =  # error
B_FiSiphonManOrifices = 0.105732 m
N_FiSiphonManOrifices = 8
D_FiSiphonManOrifices = 0.0508 m
Ti_FiBwInitiation =  # error
H_FiSand = 1.27083 m
N_FiLayer = 6
H_FiLayer = 0.2 m
V_FiLayer = 0.00183333 m/s
HL_FiTerminal = 0.455621 m
V_FiBw = 0.011 m/s
HL_FiBwInitiation = 1.45812 m
HL_FiBwSS = 1.25812 m
D_FiSand =  # error
N_Fi = 2
Q_Fi = 0.016 m^3/s
W_Slots =  # error
B_FiBwManSlot = 0.0047625 m
L_FiBwManSlot =  # error
B_FiManSlot = 0.0047625 m
L_FiManSlot =  # error
N_FiSlotRows = 2
Z_FiBottom = -2.78825 m
Z_FiTop = 1.80498 m
# Weirs
HL_FiWeir =  # error
L_FiWeir =  # error
Z_FiEntranceWeir = 1.66553 m
Z_FiBwWeir =  # error
Z_FiSiphonInlet = -0.936171 m  # This is the centerline elevation of the siphon orifices
Z_FiExitWeir =  # error
Z_FiExitBottom = 0.67386 m  # bottom of the filtered water box
Z_FiEntranceBottom = 0.67386 m  # bottom of the entrance box
Z_FiSiphonCoupling = 0.909374 m
Z_FiBwTop =  # error
W_FiBwDrain =  # error
H_FiBwDrain =  # error
N_Launders =  # error
L_LaunderPipeTotal =  # error
N_LaunderCouplings =  # error
N_ValveCouplings = 6
N_SedPlatesTotal = 960
N_SedPlatesPerSheet = 5
N_SedPlateSheets = 192
N_Valves = 6
A_EtFloor = 7.53399 m^2
W_FlocWithWalls = 2.76 m
L_FlocWithWalls = 6.61478 m
Vol_FlocFloor = 2887.35 L
A_FlocFloor = 19.249 m^2
Vol_SedSlopes =  # error
A_SedWalls =  # error
A_SedFloor = 46.3087 m^2
# Materials List
# Plant Summary Calculations:
HL_PlantTotal := Z_EtTop - H_PlantFreeboard - Z_FiExitWeir
HL_PlantTotal =  # error
## Display AC variables
AC_EntranceTank =  # no stored result
AC_FlocTank =  # no stored result
AC_OperatorAccess = [
    "-layer m OpWalkwayCon"; "c t 132,132,132"; "OpWalkwayCon"; "  "; "_-view o f"; "_pline"; "-13.41643,2.78254"; "-13.11643,2.78254"; "-13.11643,2.59307"; "-12.81643,2.59307"
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]
AC_SedTank =  # no stored result
AC_ChemTanks =  # no stored result
AC_Filter =  # no stored result
AC_ZZLayout := AC_Layout
AC_ZZMatApply
AC_Cdc = [
    "-layer m Cdc";
    "c t 125,0,160";
    "Cdc";
    "  ";
    "-insert https://confluence.cornell.edu/download/attachments/173604905/CdcLeverArm.dwg";
    "-6.04413,10.92907,2.49474 x 1 1  270";
    "-insert https://confluence.cornell.edu/download/attachments/173604905/CdcLeverArmBracket.dwg";
    "-6.45688,10.89707,2.46984 x 1 1  270";
    "-insert https://confluence.cornell.edu/download/attachments/173604905/CdcCht.dwg";
    "-7.39023,10.92907,2.58754 x 1 1  90"
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]
AC_ZZLayout = ["laythw -view _SEISO "]
Q_Plant = 0.032 m^3/s
