# AguaClara Design Tool
Country = 3
Q_Plant = 0.018
Language = 0
Country := 0
# Design References
# MathCAD dimension calculations:
# [reference: BasicClientInputs.xmcd]
# [reference: ExpertInputs.xmcd]
# [reference: DesignAssumptions.xmcd]
# [reference: MathFunctions.xmcd]
# [reference: PipeDatabase.xmcd]
# [reference: MinorLossCoefficients.xmcd]
# [reference: FluidsFunctions.xmcd]
# [reference: Sedimentation Tank.xmcd]
# [reference: Flocculator.xmcd]
# [reference: Rapid Mix.xmcd]
# [reference: LFOM.xmcd]
# [reference: EntranceTankDim.xmcd]
# [reference: LinearCdc_app37.xmcd]
# [reference: ChemStorageCylinders.xmcd]
# [reference: Materials List.xmcd]
# AutoCAD drawing programs:
# Translators:
# These are the codes that take MathCAD outputs and create AutoCAD scripts that are used to draw the plant (formerly Basics)
# [reference: MtoATranslators.xmcd]
# The wrapped MtoA translator contains the functions that the user will want to access. These functions will draw pieces with full functionality - specifying the location, dimension, and orientation of the object. Also, it contains layer control and subtraction capabilities for grouped objects.
# [reference: MtoATranslators Wrapped.xmcd]
# Plant Elements:
# These are all of the files that draw the fundamental parts of the plants (tees, elbows, tanks, pipes, etc)
# [reference: Channel.xmcd]
# [reference: cross.xmcd]
# [reference: Sludge.xmcd]
# [reference: Manifold.xmcd]
# [reference: pipe.xmcd]
# [reference: elbow.xmcd]
# [reference: Tee.xmcd]
# [reference: tank.xmcd]
# [reference: lamina.xmcd]
# [reference: adapter.xmcd]
# [reference: Tee2.xmcd]
# [reference: pvccap.xmcd]
# [reference: LaunderCap.xmcd]
# [reference: ChimneyStops.xmcd]
# [reference: laminaplain.xmcd]
# [reference: Stairs.xmcd]
# [reference: DrainChannel.xmcd]
# [reference: Manifold.xmcd]
# Specific Pieces:
# These are the codes that draw the bigger pieces of the plant (the sed tank, floc tank, etc)
# [reference: floctank.xmcd]
# [reference: chlorinestock.xmcd]
# [reference: SedTank- with pieces.xmcd]
# [reference: Entrance Tank.xmcd]
# [reference: AlumstockCylinder.xmcd]
# [reference: Plant Drain Channel.xmcd]
# [reference: Operator Access.xmcd]
# Layouts:
# This file will execute at the very end to create multiple views of the entire plant in paperspace
# [reference: Layouts.xmcd]
AC_FlocTank = [
    "-layer m FlocTank";
    "c t 132,132,132";
    "FlocTank";
    "  ";
    "_-view o t _zoom w 0.16,4.76,0 -3.66406,8.38,1.90572 _box 0,4.92,0 -3.50406,8.22,1.90572 _box 0.15,4.77,-0.15 -3.65406,8.37,1.90572 _subtract 0.15,4.77,-0.15  0,4.92,0 ";
    "_box -3.65406,5.46,0 0.15,5.61,1.90572";
    "_box -3.65406,6.15,0 0.15,6.3,1.90572";
    "_box -3.65406,6.84,0 0.15,6.99,1.90572";
    "_box -3.65406,7.53,0 0.15,7.68,1.90572";
    "-group c FlocTank y "
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]
AC_SedTank =  # no stored result
AC_ChemTanks = [
    "-layer m CoagTanks"; "c t 132,132,132"; "CoagTanks"; "  "; "_-view o t"; "_cylinder 1.556,11.65923,2.91953 0.259 1.2242"; "_cylinder 1.556,11.65923,2.92453 0.254 1.2192"; "_-view o t"; "_subtract 1.297,11.65923,2.91953  1.302,11.65923,2.91953 "; "-group c CoagTanks y "
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]
AC_EntranceTank = [
    "-layer m Cdc"; "c t 129,0,129"; "Cdc"; "  "; "-insert Float.dwg"; "-3.61201,10.66458,1.91793 0.90553 0.90553 0"; "-insert LeverArmBracket.dwg"; "-3.57841,10.25813,2.31953 1 1 0"; "-insert LeverArm.dwg"; "-3.61041,10.67087,2.34443 1 1 0"
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]
AC_OperatorAccess = [
    "-layer m Walkway";
    "c t 132,132,132";
    "Walkway";
    "  ";
    "_box 0.15,0,1.23773 1.65,8.37,1.53773";
    "-group c Walkway y ";
    "all ";
    "-layer s 0";
    "  ";
    "-layer f Walkway";
    "  ";
    "_box 0.15,0.49174,1.23773 0.29478,0.58826,1.53773";
    "-array all  R 4 1 1.23";
    "_box 0.15,5.12968,1.23773 0.33098,5.25033,1.53773";
    "_box 0.15,6.50968,1.23773 0.33098,6.63033,1.53773";
    "_box 0.15,7.88968,1.23773 0.33098,8.01033,1.53773";
    "-group c DeleteMe y ";
    "all ";
    "-layer t Walkway";
    "  ";
    "_subtract";
    "g Walkway";
    " g DeleteMe ";
    "-layer f Walkway";
    "  "
]
AC_Filter =  # no stored result
