# [reference: MasterProgram.xmcd]
echannelbox_dim := [W_ExitChannel; N_SedTanks*(W_Sed + T_PlantWall); H_ExitChannel]
echanneltank_origin :=
    if sedlayout == 2
        origin ← [
            Plant_Origin[0];
            Plant_Origin[1] - T_PlantWall - (4*ConRadius(ND_PltWeir)) - (3*S_Elbow);
            Plant_Origin[2] + H_Sed - H_ExitChannel
        ]
    if sedlayout == 3
        origin ← [
            Plant_Origin[0] - L_Sed + W_InletChannel + T_ChannelWall + S_Elbow + ElbowRadius(ND_PltWeir) + ConRadius(ND_PltWeir) + SocketDepth(ND_PltWeir);
            Plant_Origin[1] - T_PlantWall - (4*ConRadius(ND_PltWeir)) - (3*S_Elbow);
            Plant_Origin[2] + H_Sed - H_ExitChannel
        ]
    origin
FilterInletBox_origin := [
    echanneltank_origin[0];
    echanneltank_origin[1] - T_PlantWall - W_ExitChannel;
    echanneltank_origin[2]
]
FilterInletWeir_origin := [echanneltank_origin[0]; echanneltank_origin[1] - T_PlantWall; echanneltank_origin[2]]
# Test points for weir into filter inlet box
FilterInletWeir_dim := [W_ExitChannel; T_PlantWall; H_ExitChannel/2]
FilterInletBoxscript :=
    viewtope ← viewtop1
    layernewfib ← layer_new("echanneltank", ltgrey)
    tankfib ← Tank(FilterInletBox_origin, echanneltank_dim, T_PlantWall)
    boxfib ← box(echannelbox_origin, echannelbox_origin + echannelbox_dim)
    subtractfib ← subtractD(FilterInletBox_origin, echannelbox_dim)
    subtractweir ← subtractD(FilterInletWeir_origin, FilterInletWeir_dim)
    layerset ← layer_set("0")
    layerfreezefib ← layer_freeze("echanneltank")
    one ← stack(viewtope, layernewfib, tankfib, boxfib, subtractfib, subtractweir, layerset, layerfreezefib)
    return one
AC_Filter := stack(FilterInletBoxscript)
# [component: inputs AC_Filter]
