T
# AguaClara Water Treatment Plants
# Automated Design
# Add variable descriptions next to every varible so it is easy to interpret what this all means.
AguaClaraDesignToolVersion := 10  # This is used by LabVIEW to confirm that a valid design tool program is open
# User Inputs:
# AutoCAD References
# Design References
# [reference: BasicInputs.xmcd]
# Use BasicClientInputs and ExpertClientInputs when this is run by LabVIEW.
# Use BasicInputs and ExpertInputs to use the program in MathCAD
# Change the reference by
# - right clicking
# - select properties
# - reference tab
# - type in the correct file name
# [reference: ExpertInputs.xmcd]
# [reference: DesignAssumptions.xmcd]
# [reference: MathFunctions.xmcd]
# [reference: PipeDatabase.xmcd]
# [reference: MinorLossCoefficients.xmcd]
# [reference: FluidsFunctions.xmcd]
# Sed Tanks and Slopes:
# [reference: Influent Sed Manifold.xmcd]
N_SedTanks = 3
B_SedPort = 5.90452 cm  # Height of the narrowest part of the manifold ports
W_SedPort = 5.90452 cm
H_SedBetween = 0 cm  # Distance from the top of the inlet manifold to the bottom of the ledge supporting the lamella frame
N_SedPorts = 31  # per bay
L_Sed = 9.52822 m
N_SedBays = 2  # Number of bays of inlet manifolds in each sed tank
A_SedPort = 34.8634 cm^2  # Port Area
L_SedPort = 6.81796 cm  # Length of the port through which water exits the inlet manifold
W_SedSludgeFlat = 5 cm  # Distance between tips of manifold plates (space alloted for the drain holes
W_SedSlopePlate = 30 cm  # Width of ferrous cement plates in whice one manifold port is cut
AN_SedTopInlet = 60 deg  # Angle of the top of the inlet manifold
Q_SedBay = 8.33333 L/s
42.5
AN_SedBottom = 10 deg  # Angle of the bottom of inlet manifold
L_SedSlopeManifold = 0.885218 m
W_SedBayActual = 1.0045 m
W_SedSlopePlateRemaining = 0.228221 m  # This is the extra distance between the last slope and the wall
# Sedimentation Tank Sludge Drain:
# [reference: SludgeDrain.xmcd]
N_SedSludgeOrifices = 63  # per cell
W_SedSludge = 16.2565 cm  # Width of the sludge channel
Ti_SludgeDrain = 30 min  # Tank Drain time
H_SedSludge = 8.12825 cm  # Depth of the sludge channel
B_SedSludgeOrifices = 15 cm  # Distance center to center between drain orifices
T_SedSludge = 7.4641 cm
# Thickness of the plate topping the sludge channel
# through which drain holes are formed
D_SedSludgeOrifice = 0.0127 m  # Diameter of drain orifices
T_SedSludge = 7.4641 cm
N_SedSludgeOrifices = 63
W_SedDrainCover = 19.2376 cm
ND_SedSludgeValve = 4 in
W_SedInletBottom = 0.406062 m
# Sedimentation Tank Dimensions:
# [reference: Sedimentation Dimensions.xmcd]
Z_SedSludge = 0.155924 m  # Height from 0 of the top of the sludge drain
H_SedBottomSlope = 0.0754157 m  # Height of the bottom slope
H_SedTopSlope = 0.766621 m  # Height of the top of the inlet manifold
Z_SedSlopes = 1.00254 m  # Height from 0 of the top of the inlet manifold
# Total tank wall height
W_Sed = 2.159 m  # Total tank width
L_Sed = 9.52822 m  # Total tank length
# Inlet Channel:
# [reference: Inlet Channel.xmcd]
HW_InletChannel = 0.5 m  # Width of the drop chimneys connecting channel to sed inlet manifolds
W_InletChannel = 1.5323 m  # length of drop chimmneys
L_Channel = 7.077 m
W_SedManifoldEntrance = 0.168761 m
L_SedManifoldEntrance = 0.442609 m
H_SedManifoldPort = 0.535968 m  # Ports at bottom of inlet chimney are set to be triangles
W_SedManifoldPort = 0.341009 m
N_SedInletPipes = 2  # per sed bay
H_InletChannel = 0.6 m
# Sedimentation Tank Effluent Launder:
# [reference: Launder.xmcd]
N_SedLaunderOrifices = 126  # Number of orifices per launder
# How many launders per cell?
# What is the spacing of the orfices?
# How many rows of orifices per launder?
Q_SedLaunderOrifices = 1.98413 L/min
B_SedLaunderOrifices = 0.1 m  # Center to center launder spacing
# Exit Channel:
# [reference: Exit Channel.xmcd]
# More Launder Dimensions
W_ExitChannel = 1.5323 m
ND_SedLaunder = 6 in
H_ExitChannel = 0.6 m
L_SedLaunder = 6.31362 m
L_ExitChannel = 7.077 m
H_PltWeir = 0.365624 m  # height of the weir carrying water to the distribution tank
D_SedLaunderOrifice = 0.375 in
HW_ExitChannel = 0.46 m
# height from 0 of the launder
# water height in exit channel from 0
# Lamella:
# [reference: Lamella.xmcd]
L_SedPlate = 0.522514 m
42.5 in = 1.0795 m
B_SedPlate = 2.1675 cm  # center to center distance between lamella
S_SedPlate = 1.7 cm  # spacing between lamella
N_SedPlates = 237  # Number of Sed Plates per Sedimentation Tank Bay.
2*1.9*in = 0.09652 m
AN_SedPlate = 60 deg
ZW_ExitChannel = 1.71254 m
V_SedC = 9.17309 m/day
L_SedActive = 5.08137 m  # T
V_SedUp = 70 m/day
Z_SedLaunder = 1.62841 m
H_SedPlate = 0.261257 m
H_SedAbove = 0.208275 m  # Height of water needed above the lamella
HW_Sed = 1.75254 m
H_Sed = 1.85254 m
Z_Mp = 1.25254 m
H_SedBayDivider = 1.11474 m
W_SedBayDivider = 0.15 m
# Sedimentation Tank Floc Hopper:
# [reference: Floc Hopper.xmcd]
A_FlocHopper = 2.592 m^2
L_FlocHopper = 2.58039 m  # Length of the hopper cement plate
L_FlocHopperOffset = 0.261257 m  # distance from the edge of the channel to the bottom of the first lamella (collection distance)
W_FlocHopper = 1.0045 m  # width of the hopper set within each bay
# Flow Controller:
# [reference: FCM.xmcd]
N_Fcm = 6
ID_FcmTube = 4.318 mm
ID_FcmTube = 0.17 in
L_FcmTube = 257.56 cm
Q_FcmTubeMax = 375 mL/min
HL_FcmValve = 26.1265 cm
# Flocculator: | Look at Flocculator Positioning arrays
# [reference: Flocculation Energy Dissapation.xmcd]
W_FlocChannel = 0.857705 m
L_Sed = 9.52822 m  # Fill last channel with bafffles from last channel
# Fix port width to be based on energy dissipation in that channel
L_FlocTank/N_FlocChannels = 9.52822 m  # Adjust spacing after the number of baffles per channel is known.
ED_Floc = [6.4; 0.4] mW/kg
# Check the residence time of the flocculator should be at least 20minutes
HW_FlocEnd = 1.75254 m
X_FlocBaffles = [
    0.358676, 0.438411, 0.916822, 0.916822, 0.916822;
    0.757352, 0.916822, 1.87364, 1.87364, 1.87364;
    1.15603, 1.39523, 2.83047, 2.83047, 2.83047;
    1.5547, 1.87364, 3.78729, 3.78729, 3.78729;
    1.95338, 2.35206, 4.74411, 4.74411, 4.74411;
    2.35206, 2.83047, 5.70093, 5.70093, 5.70093;
    2.75073, 3.30888, 6.65775, 6.65775, 6.65775;
    3.14941, 3.78729, 7.61458, 7.61458, 7.61458;
    3.54808, 4.2657, 8.5714, 8.5714, 8.5714;
    3.94676, 4.74411, 0, 0, 0;
    4.34543, 5.22252, 0, 0, 0;
    4.74411, 5.70093, 0, 0, 0;
    5.14279, 6.17934, 0, 0, 0;
    5.54146, 6.65775, 0, 0, 0;
    5.94014, 7.13617, 0, 0, 0;
    6.33881, 7.61458, 0, 0, 0;
    6.73749, 8.09299, 0, 0, 0;
    7.13617, 8.5714, 0, 0, 0;
    7.53484, 9.04981, 0, 0, 0;
    7.93352, 0, 0, 0, 0;
    8.33219, 0, 0, 0, 0;
    8.73087, 0, 0, 0, 0;
    9.12954, 0, 0, 0, 0
] m
L_FlocBaffles = [
    1.72002, 1.64028, 1.16187, 1.16187, 1.16187;
    1.39387, 1.31413, 0.835723, 0.835723, 0.835723;
    1.72002, 1.64028, 1.16187, 1.16187, 1.16187;
    1.39387, 1.31413, 0.835723, 0.835723, 0.835723;
    1.72002, 1.64028, 1.16187, 1.16187, 1.16187;
    1.39387, 1.31413, 0.835723, 0.835723, 0.835723;
    1.72002, 1.64028, 1.16187, 1.16187, 1.16187;
    1.39387, 1.31413, 0.835723, 0.835723, 0.835723;
    1.72002, 1.64028, 1.16187, 1.16187, 1.16187;
    1.39387, 1.31413, 0, 0, 0;
    1.72002, 1.64028, 0, 0, 0;
    1.39387, 1.31413, 0, 0, 0;
    1.72002, 1.64028, 0, 0, 0;
    1.39387, 1.31413, 0, 0, 0;
    1.72002, 1.64028, 0, 0, 0;
    1.39387, 1.31413, 0, 0, 0;
    1.72002, 1.64028, 0, 0, 0;
    1.39387, 1.31413, 0, 0, 0;
    1.72002, 1.64028, 0, 0, 0;
    1.39387, 0, 0, 0, 0;
    1.72002, 0, 0, 0, 0;
    1.39387, 0, 0, 0, 0;
    1.72002, 0, 0, 0, 0
] m
Z_FlocBaffles = [
    0.358676, 0.438411, 0.916822, 0.916822, 0.916822;
    0, 0, 0, 0, 0;
    0.358676, 0.438411, 0.916822, 0.916822, 0.916822;
    0, 0, 0, 0, 0;
    0.358676, 0.438411, 0.916822, 0.916822, 0.916822;
    0, 0, 0, 0, 0;
    0.358676, 0.438411, 0.916822, 0.916822, 0.916822;
    0, 0, 0, 0, 0;
    0.358676, 0.438411, 0.916822, 0.916822, 0.916822;
    0, 0, 0, 0, 0;
    0.358676, 0.438411, 0, 0, 0;
    0, 0, 0, 0, 0;
    0.358676, 0.438411, 0, 0, 0;
    0, 0, 0, 0, 0;
    0.358676, 0.438411, 0, 0, 0;
    0, 0, 0, 0, 0;
    0.358676, 0.438411, 0, 0, 0;
    0, 0, 0, 0, 0;
    0.358676, 0.438411, 0, 0, 0;
    0, 0, 0, 0, 0;
    0.358676, 0, 0, 0, 0;
    0, 0, 0, 0, 0;
    0.358676, 0, 0, 0, 0
] m
N_FlocChannels = 5
L_FlocTank = 47.6411 m
HL_Floc = 22.6148 cm
HW_FlocStart = 1.97869 m
S_FlocBaffle = [35.8676; 43.8411; 91.6822; 91.6822; 91.6822] cm
B_FlocBaffle = [39.8676; 47.8411; 95.6822; 95.6822; 95.6822] cm
N_FlocChannelBaffles = [23; 19; 9; 9; 9]
W_FlocPort = [0.308676; 0.388411; 0.866822; 0.866822; 0.866822] m
HL_FlocChannels = [12.9295; 7.21174; 0.824524; 0.824524; 0.824524] cm
L_FlocBaffleLower = [1.39387; 1.31413; 0.835723; 0.835723; 0.835723] m
L_FlocBaffleUpper = [1.72002; 1.64028; 1.16187; 1.16187; 1.16187] m
H_FlocPort = [0.996638; 0.968117; 0.907179; 0.907179; 0.907179] m  # residence time of the flocculator
Ti_Floc = 23.8708 min
N_FlocBaffles = 69
# Rapid Mix Unit and Entrance Tank:
# [reference: RapidMixer.xmcd]
L_Et = 9.52822 m
H_Et = 2.58916 m
W_Et = 0.6477 m
# Need to add this variables to the VNG
# Assumptions: To be moved to basic inputs file
W_EtOrifice[30] = 0.031 m  # Height of Entrance Tank Orifice
# Calculations
L_trueET[30] = 1.29264 m  # Length of Entrance Tank Orifice
Pi_EtFlow[30] = 0.278388  # Ratio of the minimum flow divided by the maximum flow through the plant.
L_FlocEntryOrifice = 85.7705 cm  # Length of orifice entering into flocculator from Rapid Mix Unit
W_FlocEntryOrifice = 10.1818 cm  # Height of orifice entering into flocculator
ED_Diffusion = 0.732512 m^2/s^3  # Minimum Energy Dissipation needed
HL_FlocEntryOrifice = 7.13979 cm  # Head loss caused by entering flocculation tank.
A_FlocEntry = 0.0873298 m^2  # Area required of entry port to flocculator
A_EtOrifice = 400.718 cm^2  # Area of Entrance Tank Orifice
HW_EtTotal = 2.48916 m  # Total Height of water at beginning of rapid mix unit
HW_Channel2 = 15.7426 cm  # Height of water at the back of the entrance tank channel (from channel bottom)
HW_EtChannel = 8.16429 cm  # Height of Waterfall into flocculator
W_EtChannel = 35.8676 cm  # Widt of entrance tank channel
Vol_Stock = 4050 L  # Volume of chemical stock tanks
# Elevations:
ZW_ExitChannel = 1.71254 m  # Water Level at the end of the plant in the exit channel and exit channel box
HW_Sed = 1.75254 m
HW_FlocStart = 1.97869 m  # Water level at the beginning of the floc tank
HL_Floc = 22.6148 cm  # just for ref. the head loss throught the floc tank
HW_EtTotal = 2.48916 m  # Height of the water in the entrance channel
# [reference: Materials List.xmcd]
L_LaunderPipe = 6.31362 m
N_Launders = 12
L_LaunderPipeTotal = 75.7635 m
N_Valves = 6
N_LaunderCouplings = 12
N_ValveCouplings = 6
N_SedPlates = 1422
N_SedPlatesPerSheet = 6
N_SedPlateSheets = 237
N_PipeSedPlateStand =  # error: This variable is undefined.
A_SedTank = 69.5543 m^2
A_FlocTank = 49.5197 m^2
A_EntranceTank = 9.17205 m^2
# [reference: AutoCADMasterProgram.xmcd]
# AutoCAD References
FlocTank =  # error
