# AguaClara Water Treatment Plants
# Automated Design
# References
# Here we will reference the subprograms: Unit Processes, Hydraulic Design, AutoCAD?, and Report Generator?. In order to be able to transfer data from one subprogram to another we will need to be able to send and recieve everything through function calls.
# [reference: HydraulicDesign.xmcd]
# [reference: UnitProcesses.xmcd]
# User Inputs:
# Choose either a Pipe Schedule Number or an SDR rating:
# [component: outputs PipeSpecification]
# Engineer Entered Values:
Q_plant := 740*L/min
# Values used to Draw Plant:
tank_thick := 20 cm
# floc tank parameters
lvltank_thick := 20 cm
stockplat_thick := lvltank_thick
grit_thick := lvltank_thick
FlocTank_width := .8 m
platform_thick := .5 m
β := 45 deg
# sed tank parameters
channel_thick := 10 cm
SedTank_width := 100 cm  # Width of the lamella
walkway_width := 1 m
L_lamella := 80 cm  # length of the lamella
lamella_spacing := 5 cm  # lamella spacing
# grit chamber parameters
# Do you have metric of English drill bits?
# [component: outputs DrillSize]
# Calls Functions Here:
# Channel Design
Channel_dim := Channel(Q_plant, SedTank_width, tank_thick) = [3.4; 0.44409; 0.7] m
# Sedimentation Tank Design
SedTank := SedTankDesign(Q_plant, SedTank_width, lamella_spacing, L_lamella, β, Channel_dim) = [[3.952; 1; 2.04282], 53, 1.94282, 1.34282, 12.6132]
[sedtank_dim/m, N_lamella, water_depth/m, z_plat/m, v_c*day/m]
# Flocculator Design
# Flocculation File returns:
# 1st column: Floc tank dimensions: Height, Width, Length
# 2nd Column: baffle spacing in each section
# 3rd column:Floc inlet
# 4th column: Number of baffles in each section
# 5th: total headloss through the flocculator
# 6th: Dimensions of the hole in the uturn of the flocculator
Flocculator := flocculator(Q_plant, SedTank_width, L_lamella, β, lamella_spacing, tank_thick, SedTank[:, 0][0]*m) = [[7.904; 0.5; 2.23084], [0.142165; 0.297137; 0.420215], 1.5, [39; 9; -2], 0.188017, [0.112165; 1.87319], [1.72957; 1.49712; 1.3125]]
[floc_dim/m, baffle_spacing/m, floc_inleth/m, n_baffle, total_hl/m, uturnhole_dim/m, baffle_length/m]
# Chemical Feed Design
FeedDesign := ChemicalFeed(Q_plant) = 370 mL/min
# Launderer Design
Laund := Launder(Q_plant, PipeSpecification, SedTank[:, 0][0][0]*m, L_lamella) = [3.952, 0.00675415, 0.4, 0.1, 0.108204, 2]
[SedPipe_length/m, D_orifice/m, orifice_dist/m, manifold_depth/m, D_launder/m, n_orifices]
# Sludge Pipe Design
SludgePipe := Sludge(Q_plant, PipeSpecification, SedTank[:, 0][0][0]*m, lamella_spacing) = [0.108204, 0.00676152, 0.1] m
[waste_inr, D_orifice, orifice_dist]
# Plant Leveling Tank
PLT := PlantLevelingTank(Q_plant, PipeSpecification) = [0.58, 0.25, [1; 1; 0.68], 0.1778] m
[lvltank_waterlvl, wall_disp, lvltank_dim, D_weir]
# Grit Chamber Design
Grit := gritchamber(Q_plant, DrillSize, r_drum, PipeSpecification)  # disabled
[grit_dim/m, n_risers, n_orifices, D_riser/m, D_orifice/m]
n_or := [2; 1; 1]
Grit := [PLT[:, 2][0]/m, 4, n_or, 4, 1.5]
# Plant Elevation Design
# Constructing Table:
headerrow := ["Parameter"; "Value"; "Units"]
Units := [" "; " meter"; "meter"]
headercolumn := ["Number of Sedimentation Tanks"; "Lamella Spacing in Sedimentation Tank"; "Number of Lamella in Sedimenation Tank"]
Z := [n_sedtanks; lamella_spacing/m; SedTank[:, 1][0]]
length(headercolumn) = 3
length(Z) = 3
table(headerrow, headercolumn, Z) :=
    for i ∈ 0 .. length(headercolumn)
        for j ∈ 0 .. last(headerrow)
            table[i, j] ← headerrow[j] if i == 0
            otherwise
                table[i, j] ← headercolumn[i - 1] if j == 0
                table[i, j] ← Z[i - 1] if j == 1
                table[i, j] ← Units[i - 1] if j == 2
    return table
headercolumn_Dim := [" Sedimentation Tank"; "Dimensions of Flocculator"; "Dimensions of Grit Chamber"; "Dimensions of Leveling Tank"; "Dimensions of Channel"]
headerrow_Dim := ["Component"; "Length"; "Width"; "Height"; "Units"]
Dim_y := [SedTank[:, 0][0][1]; Flocculator[:, 0][0][1]; Grit[:, 0][0][1]; PLT[:, 2][0][1]; Channel_dim[1]/m]  # error: This value has units: Length, but must have units: Unitless.
Dim_z := [SedTank[:, 0][0][2]; Flocculator[:, 0][0][1]; Grit[:, 0][0][2]; PLT[:, 2][0][2]; Channel_dim[2]/m]  # error: This value has units: Length, but must have units: Unitless.
Dim_x := [SedTank[:, 0][0][0]; Flocculator[:, 0][0][0]; Grit[:, 0][0][0]; PLT[:, 2][0][0]; Channel_dim[0]/m]  # error: This value has units: Length, but must have units: Unitless.
Units2 := ["meter"; "meter"; "meter"; "meter"; "meter"]
tableDim(headerrow_Dim, headercolumn_Dim, Dim_x, Dim_y, Dim_z, Units2) :=
    for i ∈ 0 .. length(headercolumn_Dim)
        for j ∈ 0 .. last(headerrow_Dim)
            tableDim[i, j] ← headerrow_Dim[j] if i == 0
            otherwise
                tableDim[i, j] ← headercolumn_Dim[i - 1] if j == 0
                tableDim[i, j] ← Dim_x[i - 1] if j == 1
                tableDim[i, j] ← Dim_y[i - 1] if j == 2
                tableDim[i, j] ← Dim_z[i - 1] if j == 3
                tableDim[i, j] ← Units2[i - 1] if j == 4
    return tableDim
# Construct Plant Elevation Tables
headerrow_elevation := ["Element"; "Elevation from bottom of the sed tank (m)"; "Elevation from platform (m)"]
# top of alum stock tank
# port on alum stock tank
# bottom of alum stock tank
# alum platform height
# valve level in the FCM
# water level in the FCM
# end of the FCM tube at maximum alum dose
# grit chamber wall
# grit chamber maximum water level
# orifice elevation in the grit chamber
# horizontal pipe centerline where it leaves the grit chamber
# water level in rapid mix
# wall height for beginning of flocculator
# water level at beginning of flocculator
# wall height for the sedimentation tank
# water level in the sedimentation tank and channel
# top of the effluent launder
# top of the plate settlers
# bottom of the plate settlers
# platform height
# weir height
# level control water height
headercolumn_elevation := [
    "top of alum stock tank";
    "port on alum stock tank";
    "bottom of alum stock tank";
    "alum platform height";
    "valve level in the FCM";
    "water level in the FCM";
    "end of the FCM tube at maximum alum dose";
    "grit chamber wall";
    "grit chamber maximum water level";
    "orifice elevation in the grit chamber";
    "horizontal pipe centerline where it leaves the grit chamber";
    "water level in rapid mix";
    "wall height for beginning of flocculator";
    "water level at beginning of flocculator";
    "wall height for the sedimentation tank";
    "water level in the sedimentation tank and channel";
    "centerline of the effluent launder";
    "top of the plate settlers";
    "bottom of the plate settlers";
    "platform height";
    "weir height";
    "level control water height";
    "level control wall height"
]
Z_elevation := [
    Z_topAldrum;
    Z_Aldrumport;
    Z_botAldrum;
    Z_chemplatform;
    Z_FCMvalve;
    Z_FCMhighestport;
    Z_FCMlowestport;
    ZT_GC;
    ZW_GC;
    Z_GCorf;
    Z_rmhorizontalpipecenterline;
    ZW_rm;
    ZT_floc_max;
    ZW_floc_max;
    ZT_sed;
    ZW_sed;
    Z_launderCL;
    Z_platetops;
    Z_platebottoms;
    Z_platform;
    Z_weir;
    ZW_level;
    ZT_level
]  # error: This variable is undefined.
tableElevation(headerrow_elevation, headercolumn_elevation, Z_elevation) :=
    for i ∈ 0 .. length(headercolumn_elevation)
        for j ∈ 0 .. last(headerrow_elevation)
            table[i, j] ← headerrow_elevation[j] if i == 0
            otherwise
                table[i, j] ← headercolumn_elevation[i - 1] if j == 0
                table[i, j] ← Z_elevation[i - 1] if j == 1
                table[i, j] ← Z_elevation[i - 1] - Z_elevation[22] if j == 2
    return tableElevation  # error: This function refers to itself inconsistently.
# Table of Parameters:
# top
# [component: inputs table(headerrow, headercolumn, Z)]
# [component: inputs tableDim(headerrow_Dim, headercolumn_Dim, Dim_x, Dim_y, Dim_z, Units2)]
# [component: inputs tableelevation(headerrow_elevation, headercolumn_elevation, Z_elevation)]
